// SBML level 3 version 1

model SimpleFALiver()

  // Compartments:
  compartment e;
  compartment c;

  // Species:
  species $M_FAx in e = 0.5/e;  // substance in mmole
  species M_FA in c = 0;  // substance in mmole
  species M_TAG in c = 0;  // substance in mmole
  species M_LD in c = 0;  // substance in mmole
  species $M_VLDL in c = 1/c;  // substance in mmole
  species $M_glycerol in c = 1/c;  // substance in mmole
  species $M_Gly3P in c = 1/c;  // substance in mmole
  species $M_ATP in c = 1/c;  // substance in mmole
  species $M_AMP in c = 1/c;  // substance in mmole
  species $M_PPi in c = 1/c;  // substance in mmole
  species $M_Pi in c = 1/c;  // substance in mmole

  // Parameters:
  cobra_default_lb = -1000;
  cobra_default_ub = 1000;
  cobra_0_bound = 0;
  minus_inf = -INF;
  plus_inf = INF;
  vm_ir = 0 mmole_per_hour;
  vm_up = 10 mmole_per_hour;
  KM_up = 0.5 mmole;
  KM_ir = 0.5 mmole;
  vm_tag = 20 mmole_per_hour;
  KM_tag = 1 mmole;
  KM_vldl = 1 mmole;
  vm_vldl = 50 mmole_per_hour;
  KM_ld = 0.1 mmole;
  vm_ld = 50 mmole_per_hour;
  KM_lipo = 10 mmole;
  vm_lipo = 50 mmole_per_hour;

  // Rate rules:
  M_LD' = ;

  // Reactions:
  R_FAup: $M_FAx -> M_FA; vm_up*(M_FAx - M_FA)/(KM_up + M_FAx + M_FA);
  R_FAir: $M_FAx => M_FA; vm_ir*M_FAx/(KM_ir + M_FAx);
  R_TAGsyn: $M_Gly3P + 3 M_FA + 3 $M_ATP => M_TAG + 3 $M_AMP + 3 $M_PPi + $M_Pi; vm_tag*M_FA/(KM_tag + M_FA);
  R_VLDLsyn: M_TAG => $M_VLDL; vm_vldl*M_TAG/(KM_vldl + M_TAG);
  R_LDsyn: M_TAG => M_LD; vm_ld*M_TAG/(KM_ld + M_TAG);
  R_lipolys: M_LD => 3 M_FA + $M_glycerol; vm_lipo*M_LD/(KM_lipo + M_LD);

  // Unit definitions:
  unit mmol_per_gDW_per_hr = 1e-3 mole / (gram * 3600 second);
  unit mmole = 1e-3 mole;
  unit h = 3600 second;
  unit mmole_per_hour = 1e-3 mole / (3600 second);
end
