// SBML level 3 version 1

model model()

  // Compartments:
  compartment c1;

  // Species:
  species M_s1 in c1 = 5/c1;
  species M_s2 in c1 = 0;
  species M_Gly3P_c1 in c1;
  species M_FA_c1 in c1;
  species M_ATP_c1 in c1;
  species M_TAG_c1 in c1;
  species M_AMP_c1 in c1;
  species M_PPi_c1 in c1;
  species M_Pi_c1 in c1;

  // Parameters:
  cobra_default_lb = -1000;
  cobra_default_ub = 1000;
  cobra_0_bound = 0;
  minus_inf = -INF;
  plus_inf = INF;
  k = 1 per_second;
  vm_TAG = 2;
  KM_TAG = 1;

  // Reactions:
  R_r1: M_s1 => M_s2; k*s1*c1;
  R_TAGsyn: M_Gly3P_c1 + 3 M_FA_c1 + 3 M_ATP_c1 => M_TAG_c1 + 3 M_AMP_c1 + 3 M_PPi_c1 + M_Pi_c1; vm_TAG*FA/(KM_TAG + FA);

  // Unit definitions:
  unit mmol_per_gDW_per_hr = 1e-3 mole / (gram * 3600 second);
end
